OpenVSP model (file version 5), 8 components.
Geometry view with OpenVSP parameter names; values to 6 digits, angles in degrees, lengths in the model's unit.
Overall bounding box: X_Min=10 X_Len=280 Y_Min=-118.772 Y_Len=237.544 Z_Min=-10.6667 Z_Len=55.6667

Custom "Transport Fuselage"
  location (X Y Z) 10 0 0, rotation 0 0 0
  bounding box size 280 20 20.6667
  Design: AftCenter=0.3 AftHeight=0.3 AftMult=3 AftWidth=0.1 Diameter=20 Length=280 NoseCenter=-0.2 NoseMult=1.5
  custom script TransportFuse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

Wing "Vertical Stabilizer", child of "Transport Fuselage"
  location (X Y Z) 248 0 0, rotation 90 0 0
  bounding box size 35.7564 3.20186 45
  totals: TotalSpan=45 TotalProjectedSpan=45 TotalChord=20 TotalArea=900 TotalAR=2.25
  root: chord 32, twist 0, NACA 4-series Camber=0 CamberLoc=0.2 ThickChord=0.1
  sections:
    n  Span  Root_Chord  Tip_Chord  Area  Sweep    Sweep_Location  Dihedral  Twist  Twist_Location  tip airfoil
    1  45    32          8          900   31.6667  0               0         0      0.25            as above

Wing "Horizontal Stabilizer", child of "Vertical Stabilizer"
  location (X Y Z) 264 0 26.2032, rotation 0 0 0
  symmetric about XZ
  bounding box size 21.1287 90 1.90131
  totals: TotalSpan=90 TotalProjectedSpan=90 TotalChord=11.876 TotalArea=1068.84 TotalAR=7.57829
  root: chord 19.0021, twist 0, NACA 4-series Camber=0 CamberLoc=0.2 ThickChord=0.1
  sections:
    n  Span  Root_Chord  Tip_Chord  Area     Sweep  Sweep_Location  Dihedral  Twist  Twist_Location  tip airfoil
    1  45    19.0021     4.75       534.421  20     0               0         0      0.25            as above

Wing "Back Ailerons", child of "Horizontal Stabilizer"
  location (X Y Z) 281 45 26.203, rotation 80.9626 0 0
  symmetric about XZ
  bounding box size 5.84392 94.8927 14.8655
  totals: TotalSpan=30 TotalProjectedSpan=30 TotalChord=3.28734 TotalArea=98.6202 TotalAR=9.12592
  root: chord 4.75, twist 0, NACA 4-series Camber=0 CamberLoc=0.2 ThickChord=0.1
  sections:
    n  Span  Root_Chord  Tip_Chord  Area     Sweep  Sweep_Location  Dihedral  Twist  Twist_Location  tip airfoil
    1  15    4.75        1.82468    49.3101  15     0               0         0      0.25            as above

Wing "Wing", child of "Transport Fuselage"
  location (X Y Z) 90 0 7.13115, rotation 0 0 0
  symmetric about XZ
  bounding box size 68.8898 232.12 7.18618
  totals: TotalSpan=232.12 TotalProjectedSpan=232.12 TotalChord=31.2877 TotalArea=7262.5 TotalAR=7.41891
  root: chord 47.7753, twist 0, NACA 4-series Camber=0.07 CamberLoc=0.85 ThickChord=0.13
  sections:
    n  Span    Root_Chord  Tip_Chord  Area     Sweep  Sweep_Location  Dihedral  Twist  Twist_Location  tip airfoil
    1  116.06  47.7753     14.8       3631.25  25     0               0         5      0.25            NACA 4-series Camber=0 CamberLoc=0.2 ThickChord=0.1

Wing "Wing Ailerons", child of "Wing"
  location (X Y Z) 144 116 6.5, rotation 90 0 0
  symmetric about XZ
  bounding box size 14.8 237.544 14.7721
  totals: TotalSpan=30 TotalProjectedSpan=29.5442 TotalChord=9.074 TotalArea=272.22 TotalAR=3.20646
  root: chord 14.8, twist 0, NACA 4-series Camber=0 CamberLoc=0.2 ThickChord=0.1
  sections:
    n  Span  Root_Chord  Tip_Chord  Area    Sweep  Sweep_Location  Dihedral  Twist  Twist_Location  tip airfoil
    1  15    14.8        3.348      136.11  30     0               -10       0      0.25            as above

Pod "Engines", child of "Wing"
  location (X Y Z) 97 37.7174 2, rotation 0 0 0
  symmetric about XZ
  bounding box size 60 85.4348 10
  Design: FineRatio=12 Length=60

Pod "Engines"
  location (X Y Z) 115 80 2, rotation 0 0 0
  symmetric about XZ
  bounding box size 60 170 10
  Design: FineRatio=12 Length=60
