OpenVSP model (file version 5), 8 components.
Geometry view with OpenVSP parameter names; values to 6 digits, angles in degrees, lengths in the model's unit.
Overall bounding box: X_Min=-2.07107 X_Len=202.071 Y_Min=-130.217 Y_Len=260.434 Z_Min=-18.0087 Z_Len=62.2265

Wing "MainWing"
  location (X Y Z) 25 0 8, rotation 180 0 0
  symmetric about XZ
  bounding box size 66.6551 260.434 25.7116
  totals: TotalSpan=240 TotalProjectedSpan=240 TotalChord=43 TotalArea=9660.88 TotalAR=5.96219
  root: chord 50.8467, twist 0, NACA 4-series Camber=0 CamberLoc=0.2 ThickChord=0.2
  sections:
    n  Span  Root_Chord  Tip_Chord  Area     Sweep  Sweep_Location  Dihedral  Twist  Twist_Location  tip airfoil
    1  30    50.8467     50.8467    1525.4   0      0.4             0         0      0.25            as above
    2  30    50.8467     41.4307    1384.16  20     0.4             0         0      0.25            as above
    3  60    41.4307     22.5985    1920.88  20     0.4             0         0      0.25            as above

Pod "Trent 700(inner)", child of "MainWing"
  location (X Y Z) 55 70 2, rotation 180 0 0
  symmetric about XZ
  bounding box size 18.5 147.4 7.4
  Design: FineRatio=5 Length=18.5

Pod "Trent 700(outer)", child of "MainWing"
  location (X Y Z) 61 90 3, rotation 180 0 0
  symmetric about XZ
  bounding box size 18.5 187.4 7.4
  Design: FineRatio=5 Length=18.5

Wing "Vertical Stabilizer"
  location (X Y Z) 147.8 30 12.4, rotation 90 0 0
  symmetric about XZ
  bounding box size 47.4634 63.8417 30
  totals: TotalSpan=60 TotalProjectedSpan=60 TotalChord=28 TotalArea=1680 TotalAR=2.14286
  root: chord 32, twist 0, NACA 4-series Camber=0 CamberLoc=0.2 ThickChord=0.12
  sections:
    n  Span  Root_Chord  Tip_Chord  Area  Sweep  Sweep_Location  Dihedral  Twist  Twist_Location  tip airfoil
    1  30    32          24         840   30     0.767857        0         0      0.25            NACA 4-series Camber=0 CamberLoc=0.2 ThickChord=0.1

Wing "Horizontal Stabilizer", child of "Vertical Stabilizer"
  location (X Y Z) 171 0 42.4, rotation 180 0 0
  symmetric about XZ
  bounding box size 24.2286 120 3.63557
  totals: TotalSpan=120 TotalProjectedSpan=120 TotalChord=21.2 TotalArea=2544 TotalAR=5.66038
  root: chord 24.2286, twist 0, NACA 4-series Camber=0 CamberLoc=0.2 ThickChord=0.15
  sections:
    n  Span  Root_Chord  Tip_Chord  Area     Sweep  Sweep_Location  Dihedral  Twist  Twist_Location  tip airfoil
    1  30    24.2286     24.2286    726.857  0      0               0         0      0.25            as above
    2  30    24.2286     12.1143    545.143  20     0               0         -10    0.25            NACA 4-series Camber=0 CamberLoc=0.2 ThickChord=0.2

Fuselage "Fuselage(Rectangle)"
  location (X Y Z) 0 30 0, rotation 180 0 0
  symmetric about XZ
  bounding box size 202.071 88.0174 41.5153
  Design: Length=200
  cross sections:
    n  XLocPercent  YLocPercent  ZLocPercent  shape
    0  0            0            0.02         circle Circle_Diameter=10
    1  0.25         0            0            rounded rectangle RoundRectXSec_Radius=5 RoundedRect_Height=28 RoundedRect_Width=20
    2  0.5          0            0            as above
    3  0.75         0            0            as above
    4  1            0            -0.07        point

Custom "M1A2"
  location (X Y Z) 100 30 0, rotation 180 0 0
  symmetric about XZ
  bounding box size 32.25 72 7.8
  Design: Height=7.8 Length=32.25 SquareFlag=0 Width=12
  custom script Box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

Custom "M1A2", child of "M1A2"
  location (X Y Z) 50 30 0, rotation 180 0 0
  symmetric about XZ
  bounding box size 32.25 72 7.8
  Design: Height=7.8 Length=32.25 SquareFlag=0 Width=12
  custom script Box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
