OpenVSP model (file version 5), 8 components.
Geometry view with OpenVSP parameter names; values to 6 digits, angles in degrees, lengths in the model's unit.
Overall bounding box: X_Min=0 X_Len=177.8 Y_Min=-86.12 Y_Len=172.24 Z_Min=-12 Z_Len=48.7317

Wing "WingGeom"
  location (X Y Z) 40 0.857143 8.19672, rotation 0 2.5 0
  symmetric about XZ
  bounding box size 49.1844 172.24 5.34967
  totals: TotalSpan=170 TotalProjectedSpan=170 TotalChord=20 TotalArea=5151.17 TotalAR=5.61038
  root: chord 49.2308, twist 0, NACA 4-series Camber=0 CamberLoc=0.2 ThickChord=0.1
  sections:
    n  Span     Root_Chord  Tip_Chord  Area     Sweep  Sweep_Location  Dihedral  Twist  Twist_Location  tip airfoil
    1  83.1522  49.2308     12.3077    2558.53  2      0.5             0         0      0.25            NACA 4-series Camber=0.07 CamberLoc=0.25 ThickChord=0
    2  1.84783  12.3077     6.15385    17.0569  0      0.5             0         0      0.25            NACA 4-series Camber=0 CamberLoc=0.2 ThickChord=0.1

Custom "Duct", child of "WingGeom"
  location (X Y Z) 45 30 1.08696, rotation 0 0 0
  symmetric about XZ
  bounding box size 20 73.2012 13.381
  Design: Camber=0 CamberLoc=0.2 Chord=20 Height=11.2 InvertFlag=0 Shape=0 ThickChord=0.1 Width=11.2
  custom script Duct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

Propeller "PropGeom", child of "Duct"
  location (X Y Z) 38 30 1.08696, rotation 0 0 0; relative location -7 0 0, rotation 0 0 0
  symmetric about XZ
  bounding box size 0.634255 68.0144 8.01441
  Design: Diameter=8 NumBlade=20 Beta34=45 UseBeta34Flag=1 Feather=25 Rotate=0 Precone=0 ReverseFlag=0 FoldAngle=0 PropMode=0 AF=151.538 CLi=0.538798 Chord=0.177656 Solidity=1 ConstructXoC=0.5 FeatherAxisXoC=0.5 FeatherOffsetXoC=0
  cross sections:
    n  RadiusFrac  shape
    0  0.2         ellipse Ellipse_Height=0.16 Ellipse_Width=0.32
    1  0.4         NACA 16-series Chord=0.665 IdealCl=0.7 ThickChord=0.144074
    2  1           NACA 16-series Chord=0.52 IdealCl=0.2 ThickChord=0.03
  Chord along r/R (cubic Bezier): 0.2: 0.08, 0.333333: 0.15, 0.466667: 0.2, 0.6: 0.2, 0.716667: 0.2, 0.833333: 0.2, 0.95: 0.2, 0.966667: 0.2, 0.983333: 0.2, 1: 0.13
  Twist along r/R (PCHIP): 0.2: 46.75, 0.75: 20, 1: 13
  Thick along r/R (cubic Bezier): 0.2: 0.5, 0.233333: 0.3, 0.266667: 0.225, 0.3: 0.2, 0.4: 0.125, 0.5: 0.115, 0.6: 0.1, 0.733333: 0.075, 0.866667: 0.055, 1: 0.03
  CLI along r/R (cubic Bezier): 0.2: 0, 0.266667: 0.7, 0.333333: 0.7, 0.4: 0.7, 0.466667: 0.7, 0.533333: 0.7, 0.6: 0.7, 0.733333: 0.7, 0.866667: 0.7, 1: 0.2

Custom "Duct", child of "WingGeom"
  location (X Y Z) 50 55 1.08696, rotation 0 0 0
  symmetric about XZ
  bounding box size 20 123.565 13.7495
  Design: Camber=0 CamberLoc=0.2 Chord=20 Height=11.2 InvertFlag=0 Shape=0 ThickChord=0.118182 Width=11.2
  custom script Duct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

Propeller "PropGeom", child of "Duct"
  location (X Y Z) 43 55 1.08696, rotation 0 0 0; relative location -7 0 0, rotation 0 0 0
  symmetric about XZ
  bounding box size 0.215046 118.014 8.01441
  Design: Diameter=8 NumBlade=20 Beta34=0.905512 UseBeta34Flag=1 Feather=-19.0945 Rotate=0 Precone=0 ReverseFlag=0 FoldAngle=0 PropMode=0 AF=151.538 CLi=0.538798 Chord=0.177656 Solidity=1 ConstructXoC=0.5 FeatherAxisXoC=0.5 FeatherOffsetXoC=0
  cross sections:
    n  RadiusFrac  shape
    0  0.2         ellipse Ellipse_Height=0.16 Ellipse_Width=0.32
    1  0.4         NACA 16-series Chord=0.665 IdealCl=0.7 ThickChord=0.144074
    2  1           NACA 16-series Chord=0.52 IdealCl=0.2 ThickChord=0.03
  blade curves as in "PropGeom"

Custom "TransportFuse"
  location (X Y Z) 0 0 0, rotation 0 0 0
  bounding box size 170 22.5 23.25
  Design: AftCenter=0.3 AftHeight=0.3 AftMult=1.63 AftWidth=0.1 Diameter=22.5 Length=170 NoseCenter=-0.2 NoseMult=1.18
  custom script TransportFuse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

Wing "WingGeom", child of "TransportFuse"
  location (X Y Z) 140 0 11.5, rotation 90 0 0
  symmetric about XZ
  bounding box size 31 2.40139 25.2317
  totals: TotalSpan=50 TotalProjectedSpan=50 TotalChord=15 TotalArea=750 TotalAR=3.33333
  root: chord 24, twist 0, NACA 4-series Camber=0 CamberLoc=0.2 ThickChord=0.1
  sections:
    n  Span  Root_Chord  Tip_Chord  Area  Sweep  Sweep_Location  Dihedral  Twist  Twist_Location  tip airfoil
    1  25    24          6          375   45     0               0         0      0.25            as above

Wing "WingGeom", child of "WingGeom"
  location (X Y Z) 157 0 35, rotation 0 0 0
  symmetric about XZ
  bounding box size 20.8 65.4516 2.08121
  totals: TotalSpan=65 TotalProjectedSpan=65 TotalChord=13 TotalArea=845 TotalAR=5
  root: chord 20.8, twist 0, NACA 4-series Camber=0 CamberLoc=0.2 ThickChord=0.1
  sections:
    n  Span  Root_Chord  Tip_Chord  Area   Sweep  Sweep_Location  Dihedral  Twist  Twist_Location  tip airfoil
    1  32.5  20.8        5.2        422.5  14     0               0         0      0.25            as above
